# Объявляем целевую функцию f и функцию Лагранжа L
f(x1, x2, x3) := x1^2 + x2^2 + x3^2
L(x1, x2, x3, λ1, λ2) := f(x1, x2, x3) + λ1*(x1 + x2 + x3 - 4) + λ2*(2*x1 - 3*x2 - 12)
# Находим стационарные точки
dLx1(x1, x2, x3, λ1, λ2) := d/dx1(L(x1, x2, x3, λ1, λ2))
dLx2(x1, x2, x3, λ1, λ2) := d/dx2(L(x1, x2, x3, λ1, λ2))
dLx3(x1, x2, x3, λ1, λ2) := d/dx3(L(x1, x2, x3, λ1, λ2))
dLλ1(x1, x2, x3, λ1, λ2) := d/dλ1(L(x1, x2, x3, λ1, λ2))
dLλ2(x1, x2, x3, λ1, λ2) := d/dλ2(L(x1, x2, x3, λ1, λ2))
dLx1(x1, x2, x3, λ1, λ2) → λ1 + 2*λ2 + 2*x1
dLx2(x1, x2, x3, λ1, λ2) → λ1 - 3*λ2 + 2*x2
dLx3(x1, x2, x3, λ1, λ2) → λ1 + 2*x3
dLλ1(x1, x2, x3, λ1, λ2) → x1 + x2 + x3 - 4
dLλ2(x1, x2, x3, λ1, λ2) → 2*x1 - 3*x2 - 12
x1 := 0
x2 := 0
x3 := 0
λ1 := 0
λ2 := 0
Given
dLx1(x1, x2, x3, λ1, λ2) == 0
dLx2(x1, x2, x3, λ1, λ2) == 0
dLx3(x1, x2, x3, λ1, λ2) == 0
dLλ1(x1, x2, x3, λ1, λ2) == 0
dLλ2(x1, x2, x3, λ1, λ2) == 0
R := Find(x1, x2, x3, λ1, λ2)
transpose(R) = [3.78947, -1.47368, 1.68421, -3.36842, -2.10526]
# Функция f имеет одну стационарную точку X(3.789, -1.474, 1.684)
# Для стационарной точки проверяем наличие у функции f минимума или максимума
d11(x1, x2, x3) := d^2/dx1^2(f(x1, x2, x3))
d21(x1, x2, x3) := d/dx1(d/dx2(f(x1, x2, x3)))  # d
d(□)
d31(x1, x2, x3) := d/dx1(d/dx3(f(x1, x2, x3)))
d12(x1, x2, x3) := d/dx2(d/dx1(f(x1, x2, x3)))
d22(x1, x2, x3) := d^2/dx2^2(f(x1, x2, x3))
d32(x1, x2, x3) := d/dx2(d/dx3(f(x1, x2, x3)))
d13(x1, x2, x3) := d/dx3(d/dx1(f(x1, x2, x3)))
d23(x1, x2, x3) := d/dx3(d/dx2(f(x1, x2, x3)))
d33(x1, x2, x3) := d^2/dx3^2(f(x1, x2, x3))
d11(x1, x2, x3) → 2
d21(x1, x2, x3) → 0
d31(x1, x2, x3) → 0
d12(x1, x2, x3) → 0
d22(x1, x2, x3) → 2
d32(x1, x2, x3) → 0
d13(x1, x2, x3) → 0
d23(x1, x2, x3) → 0
d33(x1, x2, x3) → 2
transpose(R) = [3.78947, -1.47368, 1.68421, -3.36842, -2.10526]
transpose(R)[:, 0] = [3.78947]
transpose(R)[:, 1] = [-1.47368]
transpose(R)[:, 2] = [1.68421]
a11 := d11(3.789, -1.474, 1.684)
a11 = 2
a12 := d12(3.789, -1.474, 1.684)
a12 = 1.88942e-14
a13 := d13(3.789, -1.474, 1.684)
a13 = -7.09118e-15
a21 := d21(3.789, -1.474, 1.684)
a21 = -3.26151e-14
a22 := d22(3.789, -1.474, 1.684)
a22 = 2
a23 := d23(3.789, -1.474, 1.684)
a23 = 8.50778e-14
a31 := d31(3.789, -1.474, 1.684)
a31 = -2.97906e-14
a32 := d32(3.789, -1.474, 1.684)
a32 = 1.64754e-14
a33 := d33(3.789, -1.474, 1.684)
a33 = 2
Δ1 := a11
Δ2 := det([a11, a12; a21, a22])
Δ3 := det([a11, a12, a13; a21, a22, a23; a31, a32, a33])
Δ1 = 2
Δ2 = 4
Δ3 = 8
f(3.789, -1.474, 1.684) = 19.3651
